# 2 CSTR isotérmicos em série
# Parâmetros do Processo:
V1 := 20
V2 := 5
q := 1
k := 0.5
Ca0(t) :=
    2 if t ≤ 0
    4 if 0 < t ≤ 10
    2 if t > 10
T1 := 50  # *Valor do limite superior
N := 10^3  # *Número de pontos
Given
# Equações: | Condições iniciais:
d/dt(Ca1(t)) == q/V1*(Ca0(t) - Ca1(t)) - k*Ca1(t)^2
Ca1(0) == 0.400
d/dt(Ca2(t)) == q/V2*(Ca1(t) - Ca2(t)) - k*Ca2(t)^2
Ca2(0) == 0.247
[Ca1; Ca2] := Odesolve([Ca1; Ca2], t, T1, N)
t1 := 0, T1/N .. T1  # *Pontos para plot
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