# Atividade 2 - Esfera
# Por Diego T. Volpatto
# Dados:
# Propriedades do material:
k := 0.45
ρ := 1080
Cp := 4000
Tinicial := 25
Tsup := 100
R := 0.5*10^-2
α := k/(ρ*Cp)
Lc := 1/6*2*R
# Propriedades do fluido:
Tfluido := 100
h := 467
# Solução:
# A solução proposta para esse problema, de acordo com o Çengel, é:
θ(r, t) == (T(r, t) - Tfluido)/(Tinicial - Tfluido) == A1*e^(-λ1^2*τ)*sin(λ1*r/R)/(λ1*r/R)  # para
τ > 0.2
# Calculando o Biot:
Bi := h*R/k = 5.18889
# Uma abordagem mais precisa para o nosso problema é exatamente considerando que h tende a infinito. Ou seja, 1/Bi = 0. É o caso para o qual a temperatura da superfície é igual ao do fluido.
#
# Nesse caso, temos (do Çengel):
λ1 := 3.1416
A1 := 2.0000
# Obtendo τ para saber o início do intervalo de tempo aplicável para minimizar os erros:
τ(t) := α*t/R^2
Given
τ(t) == 0.2
t := 30  # *Chute inicial para o "t"
tinicial := Find(t) = 48
# Definindo a equação com os parâmetros:
θ(r, t) := A1*e^(-λ1^2*τ(t))*sin(λ1*r/R)/(λ1*r/R)
# E para a temperatura:
T(r, t) := θ(r, t)*(Tinicial - Tfluido) + Tfluido
# Analisando θ para vários raios, graficamente:
tplot := tinicial, tinicial + 1 .. 500
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# Para a temperatura:
