# Atividade 2 - Esfera
# Dados:
# Propriedades do material:
k := 0.45
ρ := 1080
Cp := 4000
Tinicial := 25
Tsup := 100
R := 0.5*10^-2
α := k/(ρ*Cp)
Lc := 1/6*2*R
# Propriedades do fluido:
Tfluido := 100
h := 467
# Para geometria esférica, a descrição do nosso problema em estado transiente é:
ρ*Cp*d/dt(T) == k/r^2*(d/dr(r^2*(d/dr(T))))
# Com as condições:
t == 0
T == Tinicial
r == 0
d/dr(T) == 0
r == R
k*(d/dr(T)) == h*(Tfluido - T)
# A resolução desse problema (EDP) nos dá a temperatura adimensional:
Bih := R*h/k
Bih = 5.18889
τ(t) := α*t/R^2
ξ(r) := r/R
Given
n := 1 .. 5
λ*cot(λ) == 1 - Bih
resp(λ) := Find(λ)
resp(1) = 2.58814
resp(2) = 2.58814
resp(3) = 2.58814
resp(4) = 5.37445
resp(5) = 5.37445
resp(6) = 5.37445
resp(7) = 8.32038
resp(8) = 8.32038
resp(9) = 8.32038
resp(10) = 11.3492
resp(12) = 11.3492
resp(13) = 14.4199
resp(15) = 14.4199
resp(16) = 17.5135
# Logo, para Bih = 5.189, temos:
λ[1] := resp(1)
λ[2] := resp(4)
λ[3] := resp(7)
λ[4] := resp(10)
λ[5] := resp(13)
# Definindo o intervalo de tempo para obtenção da distribuição de temperatura:
θ(t, r) := 4*Bih*sum(sin(λ[n])/(λ[n]*(2*λ[n] - sin(2*λ[n])))*e^(-1*λ[n]^2*τ(t))*sin(λ[n]*ξ(r))/ξ(r), n = 1 .. 5)
t1 := 0, 5 .. 600
t1 = [
    0; 5; 10; 15; 20; 25; 30; 35; 40; 45
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]
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# Sabemos ainda que:
θ(t, r) == (Tfluido - T(t))/(Tfluido - Tinicial)
T(t, r) := θ(t, r)*(Tinicial - Tfluido) + Tfluido
# Segue, na próxima página, o plot para a temperatura em diversos raios em função do tempo.
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