# Resolvendo uma EDO de PVI com Mathcad
# A forma geral da EDO que pode ser resolvida por esse tutorial é a seguinte:
d/dx(y(x)) == f(x, y)  # sabendo que:
y(x0) == y0
# O nosso problema modelo é o seguinte:
f(x, y) := 1/(1 + x^2) - 2*y^2
# com os valores inicias:
x0 := 0
y0 := 0
# Entra-se agora com o parâmetro desejado para a solução:
x1 := 1  # *Esse é o valor do limite superior do intervalo onde serão feito os pontos.
N := 10^3  # *Aqui é o número de pontos que será gerado.
# Vamos então resolver com a função "odesolve":
Given
y'(x) == f(x, y(x))
y(x0) == y0  # OBS.: O ' em y'(x) é feito por Ctrl+F7!!
y := Odesolve(x, x1)
# Analisando o comportamento gráfico:
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# Resolvendo um exemplo:
# Exemplo 1: Encontre uma aproximação para y(0.1), com quatro dígitos corretos, sabendo que
# y' = xy + 1 e y(0) = 1.
# Resolvendo:
f(x, y) := x*y + 1
x0 := 0
y0 := 1
# Limite e pontos:
N := 10^2
x1 := 1
# Solução:
Given
y'(x) == f(x, y(x))
y(x0) == y0
y := Odesolve(x, x1)
# Estimando:
y(0.1) = 1.10535
# O gráfico:
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