# Minicurso de Mathcad
# Ministrante: Diego Volpatto
# Cálculos básicos:
3 + 5 = 8
3 + 5 = 8
2^2 + sqrt(15) - 3/7 = 7.44441
sin(π) + 4! + e^4 = 78.5982
e^4 = 54.5982
sin(π/2) = 1
# Vamos agora declarar variáveis:
x := 2
y := 3
y = 3
x = 2
x + y = 5
z := 2*x + y
z = 7
# Atribuindo unidades:
n := 5*mol
Vol := 5*m^3
Ca := n/Vol
Ca = 1 mol/m^3
# Definindo funções:
f(Re) := 24/Re
f(200) = 0.12
Re(ρ, v, D, μ) := ρ*v*D/μ
Re(1, 5, 0.2, 0.001) = 1000
f(Re(1, 5, 0.2, 0.001)) = 0.024
# Formatando um valor:
r := 3*m
Area := π*r^2
Area = 28.2743 m^2
# Criando matrizes e vetores:
ORIGIN := 1
v[1] := 1
v[2] := 2
v[3] := 3
v = [1; 2; 3]
# Para uma matriz
M[1, 1] := 1
M[1, 2] := 2
M[2, 1] := 3
M[2, 2] := 4
M = [1, 2; 3, 4]
# Criando pelo Menu "Matrix":
Matriz := [1, 2, 3; 4, 5, 6; 7, 8, 9]
Vetor := [1; 2; 3]
# Podemos segmentar e obter elementos de uma matriz:
Matriz[2, 3] = 6
Vetor[3, 1] = 3
Matriz[:, 3] = [3; 6; 9]
# Algumas operações matriciais:
A := [5, 6, 9, 4; 2, 8, 7, 5; 4, 2, 9, 6; 9, 1, 4, 7]
B := [8, 4, 8, 7; 9, 6, 5, 4; 6, 5, 2, 5; 1, 2, 1, 6]
A + B = [13, 10, 17, 11; 11, 14, 12, 9; 10, 7, 11, 11; 10, 3, 5, 13]
A - B = [-3, 2, 1, -3; -7, 2, 2, 1; -2, -3, 7, 1; 8, -1, 3, 1]
A*B = [152, 109, 92, 128; 135, 101, 75, 111; 110, 85, 66, 117; 112, 76, 92, 129]
3*A = [15, 18, 27, 12; 6, 24, 21, 15; 12, 6, 27, 18; 27, 3, 12, 21]
2*A - 1/3*B = [
    7.33333, 10.6667, 15.3333, 5.66667;
    1, 14, 12.3333, 8.66667;
    6, 2.33333, 17.3333, 10.3333;
    17.6667, 1.33333, 7.66667, 12
]
# Cálculo de determinantes:
|A| = 1351
|B| = -92
# Transposta:
|transpose(A)| = 1351
transpose(A) = [5, 2, 4, 9; 6, 8, 2, 1; 9, 7, 9, 4; 4, 5, 6, 7]
transpose(B) = [8, 9, 6, 1; 4, 6, 5, 2; 8, 5, 2, 1; 7, 4, 5, 6]
|transpose(B)| = -92
# Inversa:
A^-1 = [
    0.185788, -0.11695, -0.136936, 0.0947446;
    0.0481125, 0.125093, -0.150999, 0.0125833;
    0.11399, -0.103627, 0.119171, -0.0932642;
    -0.310881, 0.19171, 0.129534, 0.0725389
]
B^-1 = [
    0.586957, -1.3587, 1.6087, -1.11957;
    -0.826087, 1.78261, -1.78261, 1.26087;
    -0.23913, 0.923913, -1.17391, 0.641304;
    0.217391, -0.521739, 0.521739, -0.173913
]
# Verificando a validade da inversão:
A*A^-1 = [1, 0, 0, 0; 0, 1, 0, 0; 0, 0, 1, 0; 0, 0, 0, 1]
B*B^-1 = [1, 0, 0, 0; 0, 1, 0, 0; 0, 0, 1, 0; 0, 0, 0, 1]
# Obs.: Por esse programa usar recursos numéricos,
# vemos, às vezes, "erros" de aproximação como
# esse aqui gerado.
# Calculando autovalores:
eigenvals(A) = [21.8798; 1.5911 + 3.62601i; 1.5911 - 3.62601i; 3.93802]
eigenvals(B) = [19.5695; 3.3705; 0.801096; -1.74112]
# Autovetores:
eigenvecs(A) = [
    -0.543031, -0.319069 + 0.421464i, -0.319069 - 0.421464i, -0.125024;
    -0.492731, -0.301209 + 0.0471753i, -0.301209 - 0.0471753i, -0.769711;
    -0.472801, -0.162148 - 0.319637i, -0.162148 + 0.319637i, 0.602871;
    -0.488664, 0.706507, 0.706507, -0.1687
]
eigenvecs(B) = [
    -0.622672, -0.0544104, -0.491334, 0.635039;
    -0.624952, 0.749064, 0.783178, -0.34596;
    -0.438972, 0.205878, 0.278318, -0.684015;
    -0.170348, -0.627341, -0.260313, 0.095709
]
