# Parte 2
# Confecção de gráficos 2D:
# Primeira forma:
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# Segunda forma:
f1(x1) := x1 - 2
f2(x2) := 2*x2^3 - 1/3
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# Terceira forma:
# É necesário antes entendermos o que é "range", seu incremento padrão e etc.
i := 1 .. 5
j := 1, 1.1 .. 1.5
k := 1 .. 2
i = [1; 2; 3; 4; 5]
j = [1; 1.1; 1.2; 1.3; 1.4; 1.5]
k = [1; 2]
# Recapitulando as funções:
f1(x1) := 50*x1 - 2
x1 := 0 .. 10
x1 = [0; 1; 2; 3; 4; 5; 6; 7; 8; 9; 10]
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f2(x2) := 2*x2^3 - 1/3
x2 := -5, -4.5 .. 5
x2 = [-5; -4.5; -4; -3.5; -3; -2.5; -2; -1.5; -1; -0.5; 0; 0.5; 1; 1.5; 2; 2.5; 3; 3.5; 4; 4.5; 5]
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# Podemos criar vários plots em um mesmo gráfico:
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# Podemos gerar, inclusive, gráficos de dados discretos! Veja o exemplo a seguir!
# Confecção de gráficos em 3D:
# Nesse meu computador trava...
