# Parte 3
# Cálculo:
# Somatório e Produtório:
# Definindo a expressão: | Definindo a expressão:
f1(x) := sum(x - 2*i, i = 1 .. 3)
f2(x) := product(x + i, i = 1 .. 3)
# Resolução numérica: | Resolução numérica:
f1(5) = 3
f2(3) = 120
# Resolução simbólica: | Resolução simbólica:
f1(x) → 3*x - 12
f2(x) → (x + 1)*(x + 2)*(x + 3)
# Derivadas simbólicas e numéricas:
# Definindo a função:
f3(x) := cos(x) + 2*x^2
# Derivada simbólica:
d/dx(f3(x)) → 4*x - sin(x)
d^3/dx^3(f3(x)) → sin(x)
d^2/dx^2(f3(x)) → 4 - cos(x)
d/dx(f2(x)) → (x + 1)*(x + 2) + (x + 1)*(x + 3) + (x + 2)*(x + 3)
# Derivada numérica:
df3(x) := d/dx(f3(x))
df32(x) := d^2/dx^2(f3(x))
df3(x) → 4*x - sin(x)
df32(x) → 4 - cos(x)
df3(0.5) = 1.52057
df32(0.5) = 3.12242
# Integrais simbólicas e numéricas:
# -Simbólica:
integral(f3(x), x) → sin(x) + 2*x^3/3  # ou,
integral(f3(x), x = a .. b) → sin(b) - sin(a) - 2*a^3/3 + 2*b^3/3
# -Numérica:
x1 := 1
# e
x2 := 3
integral(f3(x), x = x1 .. x2) = 16.633
# ou,
intf3(x) := integral(f3(x), x = x1 .. x2)
intf3(2) = 16.633
# Ainda podemos escrever direto:
integral(f3(x), x = 1 .. 3) = 16.633
# Integrais duplas:
g(x, y) := 2*x^2 - 3*y^3
integral(integral(g(x, y), x), y) → 2*x^3*y/3 - 3*x*y^4/4  # (Simbólico)
integral(integral(g(x, y), x = 2 .. 4), y = 1 .. 3) = -45.3333  # (Numérico)
# Derivadas parciais:
d/dx(d/dy(g(x, y))) → 0
h(x, y) := (x - y)^3
d/dx(d/dy(h(x, y))) → 6*y - 6*x
# Cálculo de gradientes:
∇[x, y, z](g(x, y)) → [4*x; -9*y^2; 0]
∇[x, y, z](h(x, y)) → [3*(x - y)^2; -3*(x - y)^2; 0]
# Algumas funções de manipulação de expressões:
# Função expand:
(x + 2)^4 expand → x^4 + 8*x^3 + 24*x^2 + 32*x + 16
d^2/dx^2((x^3 + 2*x^(1/2))^5) expand → 1600*x^3 + 3600*x^8 + 210*x^13 + 120*sqrt(x) + 3900*x^(11/2) + 2875*x^(21/2)/2
# Função factor:
x^4 + 8*x^3 + 24*x^2 + 32*x + 16 factor → (x + 2)^4
# Função substitute:
(x + 2)^4 substitute, x == 3 → 625
# Função parfrac:
(x^2 + 6*x - 10)/(x - 1) parfrac → x - 3/(x - 1) + 7
