# Parte 4
# Raízes de um polinômio:
# Redefinindo a tolerância interna do Mathcad:
TOL = 0.001
TOL := 10^-10
TOL = 1e-10
# Definindo uma função para estudo:
f1(x) := x^3 - 20*x + 5
# Avaliando graficamente:
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# O intervalo do gráfico foi trocado para melhor
# visualização.
# Agora sabemos, aproximadamente, onde estão
# as raízes.
# Encontrando as raízes (função root):
root(f1(x), x, 0, 2) = 0.250789  # (primeira raíz)
root(f1(x), x, 4, 6) = 4.34146  # (segunda raíz)
root(f1(x), x, -6, -4) = -4.59225  # (terceira raíz)
# Podemos encontrar as raízes de um polinômio a partir de seus coeficientes (função polyroots):
coef := [5; -20; 0; 1]
polyroots(coef) = [-4.59225; 0.250789; 4.34146]
# Solução de sistemas lineares na forma Ax = b:
# Definindo o sistema:
2*z + y == 5
3*z - 2*y == 1/2
# Ele pode ser descrito pela matriz [A b]:
A := [2, 1; 3, -2]
b := [5; 1/2]
# Podemos resolver como:
x := A^-1*b
x = [1.5; 2]
# Outro exemplo:
# -Sistema:
0.3*w + 0.2*x + 6.6*y - 1.1*z == 1
4.5*w - 1.8*x - 0.3*y + 6.5*z == 0.1
-7.3*w + 9.7*x + 10.9*y - 4.1*z == 0.01
8.1*w - 2.7*x + 8.7*y + 8.9*z == 10^-3
# -Na forma [A] e [b]:
A := [0.3, 0.2, 6.6, -1.1; 4.5, -1.8, -0.3, 6.5; -7.3, 9.7, 10.9, -4.1; 8.1, -2.7, 8.7, 8.9]
b := [1; 0.1; 0.01; 10^-3]
# -Solução:
x := A^-1*b
x = [-3.93716; -2.97526; 0.745906; 1.95162]
# Bloco Given/Find:
# Resolvendo equações de processos iterativos:
# -Estimativa inicial:
f := 0.02
# -Abertura do bloco:
Given
1/sqrt(f) == -2.0*log(ε*D^-1/3.7 + 2.51/(R*sqrt(f)))  # Obs.: O "=" é Booleano! Menu "Boolean".
FricFac(ε, D, R) := Find(f)
# -Obtendo solução:
resp := FricFac(0.00085, 2.5, 10^5)
resp = 0.0196477
# Avaliando várias soluções:
i := 1 .. 19
Rplot[i] := 10000 + 10000*i
fplot[i] := FricFac(0.00085, 2.5, Rplot[i])
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# Outro Caso:
# -Iniciando o bloco:
Given
g1(x) := 1/x + 5*x^(1/2) - 10
g2(x) := 3*x
g1(x) == g2(x)  # Lembrando que esse "=" é Booleano e se encontra no respectivo Menu!
# -Estimativa inicial:
x := 5
# -Resolvendo:
Find(x) = 0.115653
# -Verificando a resposta:
g1(0.11565) = 0.347147
g2(0.11565) = 0.34695
# Podemos resolver sistemas de equações (lineares e não-lineares) com Given/Find:
# -Caso linear:
Given
2*z + y == 5
3*z - 2*y == 1/2
# Estimativa inicial:
z := 1
y := 1
# -Solução:
Find(z, y) = [1.5; 2]
# -Caso não-linear:
Given
2*a + b == 5 - 2*c^2
b^3 + 4*c == 4
a*b + c == e^c
# -Estimativas iniciais:
a := 1
b := 1
c := 1
# -Solução:
[aval; bval; cval] := Find(a, b, c)
[aval; bval; cval] = [1.42247; 0.975389; 0.768008]
# ou,
aval = 1.42247
bval = 0.975389
cval = 0.768008
