# Resolução da Lista de Exercícios
# Questão 1
# -Dados:
P := 13.76
T := 333
R := 83.14
Pc := 66.8
Tc := 416.3
# -Parâmetros:
a := 0.42748*R^2*Tc^(5/2)/Pc
b := 0.08664*R*Tc/Pc
# -Aplicando o bloco Given/Find:
Given
P == R*T/(V - b) - a/(sqrt(T)*V*(V + b))  # Equação cúbica de Redlich-Kwong
# -Estimativas e soluções:
V1 := 50
V2 := 200
V3 := 1000
resp(V) := Find(V)
resp(V1) = 71.2958
resp(V2) = 229.156
resp(V3) = 1711.58
i := 0 .. 200
V[i] := 50 + 10*i  # Avaliação gráfica
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# -Resposta:
#
# Sabe-se que nas equações cúbicas a raíz central é descartada, logo a resposta é (em cm^3):
resp(V1) = 71.2958
resp(V3) = 1711.58
# Questão 2
# -Dados:
D := 0.076*m
ρ := 1000*kg/m^3
μ := 1.3*10^-3*kg/(m*s)
dP := 1.38*10^4*Pa
L := 30*m
# -Aplicação do bloco Given/Find:
Given
f(v) := dP*D/(L*2*ρ*v^2)  # *Relação fator de atrito com queda de pressão
Re(v) := D*ρ*v/μ  # *Número de Reynolds
1/sqrt(f(v)/2) == 2.5*ln(Re(v)*sqrt(f(v)/8)) + 1.75  # *Equação de Karman
# -Estimativa inicial:
v := 1*m/s
v := Find(v)
# -Resposta:
v = 2.01304 m/s
# Questão 3
# -Dados:
F := 1
z[1] := 0.45
z[2] := 0.35
z[3] := 0.20
P := 110
Psat[1] := 195.75
Psat[2] := 97.84
Psat[3] := 50.32
# -Calculando os K:
i := 1 .. 3
K[i] := Psat[i]/P
# -Determinando V:
Given
g(V) := sum(z[i]*(K[i] - 1)/(1 + V*(K[i] - 1)), i = 1 .. 3)
g(V) == 0
# Chute inicial para V:
V := 0.5
Vfinal := Find(V)
V := Vfinal
V = 0.736522
# -Determinando L:
L := F - V
# então
L = 0.263478
# -Determinando xi e yi:
i := 1 .. 3
x[i] := z[i]*F/(L + K[i]*V)
y[i] := K[i]*x[i]
x[1] = 0.285868
y[1] = 0.508715
x[2] = 0.381023
y[2] = 0.338902
x[3] = 0.333109
y[3] = 0.152382
# -Verificando a solução:
xsoma := sum(x[i], i = 1 .. 3)
xsoma = 1
ysoma := sum(y[i], i = 1 .. 3)
ysoma = 1
